*Heading
** Job name: Axis_Indentation Model name: Model-1
** Generated by: Abaqus/CAE 2023
*Preprint, echo=NO, model=NO, history=NO, contact=NO
*Parameter
E = 300.
v = 0.3
C = E/(4.*(1.+v))
D = 6.*(1- 2.*v)/E
**
** PARTS
**
*Part, name=Indenter
*Node
      1,           0., -0.913685083
      2,           0.,          -1.
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*Element, type=CAX4R
  1,   1,   7, 348, 321
  2,   7,   8, 349, 348
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*Element, type=CAX3
472,  919,  781,  783
473,  984,  982,  952
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*Nset, nset=Indenter, generate
    1,  2354,     1
*Elset, elset=Indenter, generate
    1,  2281,     1
** Section: Indenter
*Solid Section, elset=Indenter, material=Indenter
,
*End Part
**
*Part, name=Specimen
*Node
      1,   5.19836092,         -10.
      2,   5.19836092,  -5.19836092
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*Element, type=CAX4R
 1,   1,  13, 321,  32
 2,  13,  14, 322, 321
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*Element, type=CAX3
73, 681, 680, 493
74, 495, 535, 497
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*Nset, nset=Specimen, generate
    1,  3530,     1
*Elset, elset=Specimen, generate
    1,  3455,     1
** Region: (Specimen:Specimen), (Controls:Default)
*Elset, elset=_I1, internal, generate
   1,  955,    1
** Section: Specimen
*Solid Section, elset=_I1, material=Specimen
,
** Region: (Specimen:Specimen), (Controls:EC-1)
*Elset, elset=_I2, internal, generate
  956,  3455,     1
** Section: Specimen
*Solid Section, elset=_I2, controls=EC-1, material=Specimen
,
*End Part
**
**
** ASSEMBLY
**
*Assembly, name=Assembly
**
*Instance, name=Indenter-1, part=Indenter
          0.,          0.1,           0.
*End Instance
**
*Instance, name=Specimen-1, part=Specimen
          0.,          -1.,           0.
*End Instance
**
*Node
      1,           0.,  0.100000001,           0.
*Nset, nset=FarField, instance=Specimen-1
   1,   4,   5,   6,   9,  28
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*Elset, elset=FarField, instance=Specimen-1
   1,   7,  13,  19,  25,  31
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*Nset, nset=Indenter_RP
 1,
*Elset, elset=_Indenter_Coup_Surf_S3, internal, instance=Indenter-1, generate
 469,  471,    1
*Elset, elset=_Indenter_Coup_Surf_S4, internal, instance=Indenter-1
 523, 525, 610, 611, 612, 613, 614, 615, 707, 883
*Elset, elset=_Indenter_Coup_Surf_S2, internal, instance=Indenter-1
 619, 620, 981, 990
*Surface, type=ELEMENT, name=Indenter_Coup_Surf
_Indenter_Coup_Surf_S3, S3
_Indenter_Coup_Surf_S4, S4
_Indenter_Coup_Surf_S2, S2
*Elset, elset=_Indenter_Surf_S2, internal, instance=Indenter-1, generate
   3,  471,    3
*Surface, type=ELEMENT, name=Indenter_Surf
_Indenter_Surf_S2, S2
*Elset, elset=_Specimen_Surf_S2, internal, instance=Specimen-1, generate
 1005,  3455,    50
*Surface, type=ELEMENT, name=Specimen_Surf
_Specimen_Surf_S2, S2
** Constraint: RP_Coup
*Coupling, constraint name=RP_Coup, ref node=Indenter_RP, surface=Indenter_Coup_Surf
*Kinematic
*End Assembly
**
** ELEMENT CONTROLS
**
*Section Controls, name=EC-1, hourglass=ENHANCED
1., 1., 1.
**
** MATERIALS
**
*Material, name=Indenter
*Density
 7.85e-09,
*Elastic
200000., 0.3
*Material, name=Specimen
*Density
 7.85e-09,
*Hyperelastic, neo hooke
<C>,<D>
**
** INTERACTION PROPERTIES
**
*Include, input=INT_Props.inp
**
** BOUNDARY CONDITIONS
**
** Name: FIX Type: Displacement/Rotation
*Boundary
FarField, 1, 1
FarField, 2, 2
** Name: Indenter_Motion Type: Displacement/Rotation
*Boundary
Indenter_RP, 1, 1
Indenter_RP, 2, 2
Indenter_RP, 6, 6
**
** INTERACTIONS
**
** Interaction: Van_der_Waals_Interaction
*Contact Pair, interaction=Van_der_Waals, type=SURFACE TO SURFACE
Indenter_Surf, Specimen_Surf
** ----------------------------------------------------------------
**
** STEP: Indentation
**
*Step, name=Indentation, nlgeom=YES, inc=100000
*Dynamic,application=QUASI-STATIC,initial=NO
0.05,1.,1e-10,0.05
**
** BOUNDARY CONDITIONS
**
** Name: Indenter_Motion Type: Displacement/Rotation
*Boundary
Indenter_RP, 2, 2, -0.2
**
** OUTPUT REQUESTS
**
*Restart, write, frequency=0
**
** FIELD OUTPUT: F-Output-1
**
*Output, field, variable=PRESELECT, frequency=1
**
** HISTORY OUTPUT: H-Output-2
**
*Output, history, frequency=1
*Node Output, nset=Indenter_RP
RF2, U2
**
** HISTORY OUTPUT: H-Output-1
**
*Output, history, variable=PRESELECT, frequency=1
*End Step
** ----------------------------------------------------------------
**
** STEP: Unloading
**
*Step, name=Unloading, nlgeom=YES, inc=10000
*Dynamic,application=QUASI-STATIC,initial=NO
0.05,1.,1e-10,0.05
**
** BOUNDARY CONDITIONS
**
** Name: Indenter_Motion Type: Displacement/Rotation
*Boundary
Indenter_RP, 2, 2
**
** OUTPUT REQUESTS
**
*Restart, write, frequency=0
**
** FIELD OUTPUT: F-Output-1
**
*Output, field, variable=PRESELECT, frequency=1
**
** HISTORY OUTPUT: H-Output-2
**
*Output, history, frequency=1
*Node Output, nset=Indenter_RP
RF2, U2
**
** HISTORY OUTPUT: H-Output-1
**
*Output, history, variable=PRESELECT, frequency=1
*End Step
